<?xml version="1.0" ?>
<propeller name="APC_13x8E">
	<ixx>0.000397</ixx>
	<diameter unit="IN">13.0</diameter>
	<numblades>2</numblades>
	<minpitch>8.0</minpitch>
	<maxpitch>8.0</maxpitch>
	<!-- Baseline Configuration -->
	<torqueleverarm>1</torqueleverarm>
	<!--Final Configuration
	<torqueleverarm>2.53</torqueleverarm>
	-->
	<table name="C_THRUST" type="internal">
		<tableData>
		0.0 	0.1032
		0.03	0.103
		0.06	0.1028
		0.09	0.1025
		0.11	0.102
		0.14	0.1012
		0.17	0.1
		0.2 	0.0983
		0.23	0.0963
		0.26	0.094
		0.29	0.0913
		0.31	0.0884
		0.34	0.0851
		0.37	0.0815
		0.4 	0.0776
		0.43	0.0735
		0.46	0.069
		0.48	0.0643
		0.51	0.0595
		0.54	0.0546
		0.57	0.0496
		0.6 	0.0445
		0.63	0.0393
		0.66	0.034
		0.68	0.0286
		0.71	0.0231
		0.74	0.0174
		0.77	0.0117
		0.8 	0.0059
		0.83	0.0
		</tableData>
	</table>
	<table name="C_POWER" type="internal">
		<tableData>
		0.0 	0.0627
		0.03	0.0615
		0.06	0.0603
		0.09	0.0591
		0.11	0.0578
		0.14	0.0564
		0.17	0.0549
		0.2 	0.0534
		0.23	0.0521
		0.26	0.051
		0.29	0.0499
		0.31	0.0489
		0.34	0.0479
		0.37	0.0467
		0.4 	0.0455
		0.43	0.0442
		0.46	0.0427
		0.48	0.041
		0.51	0.0392
		0.54	0.0371
		0.57	0.0348
		0.6 	0.0323
		0.63	0.0296
		0.66	0.0267
		0.68	0.0234
		0.71	0.0199
		0.74	0.0161
		0.77	0.0121
		0.8 	0.0077
		0.83	0.0037
		</tableData>
	</table>
</propeller>
