<?xml version="1.0"?>
<?xml-stylesheet type="text/xsl" href="http://jsbsim.sourceforge.net/JSBSim.xsl"?>
<fdm_config xmlns:xsi="http://www.w3.org/2001/XMLSchema-instance" name="dflyer" version="2.0" release="ALPHA" xsi:noNamespaceSchemaLocation="http://jsbsim.sourceforge.net/JSBSim.xsd">
  <fileheader>
    <author>Matt Vacanti</author>
    <filecreationdate> 2020-01-04 </filecreationdate>
    <version>0.0 </version>
    <description> Hexarotor X</description>
      <note>
        This model was created using publicly available data, publicly available technical
        reports, textbooks, testing, and guesses. It contains no proprietary or restricted data.
        If this model has been validated at all, it would be only to the extent that it seems to fly,
        bounce, or roll, in a plausible way, and that it possibly complies with published, publicly known,
        performance data. Thus, this model is meant for educational and entertainment purposes only.
        This simulation model has no bearing to a real vehicle. This model is not to be sold.
      </note>
  </fileheader>
  <metrics>
    <wingarea unit="M2">   0.017</wingarea>
    <wingspan unit="M">   0.13 </wingspan>
    <chord unit="FT">  0.0 </chord>
    <htailarea unit="FT2">  0.0 </htailarea>
    <htailarm unit="FT">  0.0 </htailarm>
    <vtailarea unit="FT2">  0.0 </vtailarea>
    <vtailarm unit="FT">  0.0 </vtailarm>
    <location name="AERORP" unit="M">
      <x>   0.00 </x>
      <y>   0.00 </y>
      <z>   0.345 </z>
    </location>
    <location name="EYEPOINT" unit="M">
      <x>  0.0 </x>
      <y>  0.0 </y>
      <z>  0.345 </z>
    </location>
    <location name="VRP" unit="M">
      <x>0</x>
      <y>0</y>
      <z>0.345</z>
    </location>
  </metrics>
  <mass_balance>
    <ixx unit="KG*M2"> 0.45 </ixx>
    <iyy unit="KG*M2"> 0.45 </iyy>
    <izz unit="KG*M2"> 0.95 </izz>
    <emptywt unit="KG"> 5.632 </emptywt>
    <location name="CG" unit="M">
      <x>  0.0 </x>
      <y>  0.0 </y>
      <z>  0.345 </z>
    </location>
    <pointmass name="Payload">
      <weight unit="KG"> 0.0 </weight>
      <location unit="IN">
        <x>  0.0 </x>
        <y>  0.0 </y>
        <z>  0.345 </z>
      </location>
    </pointmass>
  </mass_balance>
  <ground_reactions>
    <contact type="STRUCTURE" name="frontbase">
      <location unit="M">
        <x>  -0.283 </x>
        <y>   0.00 </y>
        <z>  -0.033</z>
      </location>
      <static_friction>  5 </static_friction>
      <dynamic_friction> 5 </dynamic_friction>
      <spring_coeff unit="N/M">220</spring_coeff>
      <damping_coeff unit="N/M/SEC">60</damping_coeff>
    </contact>
    <contact type="STRUCTURE" name="rearbase">
      <location unit="M">
        <x>   0.283 </x>
        <y>   0.00 </y>
        <z>  -0.033</z>
      </location>
      <static_friction>  5 </static_friction>
      <dynamic_friction> 5 </dynamic_friction>
      <spring_coeff unit="N/M">220</spring_coeff>
      <damping_coeff unit="N/M/SEC">60</damping_coeff>
    </contact>
    <contact type="STRUCTURE" name="leftbase">
      <location unit="M">
        <x>   0.00 </x>
        <y>   0.283 </y>
        <z>  -0.033</z>
      </location>
      <static_friction>  5 </static_friction>
      <dynamic_friction> 5 </dynamic_friction>
      <spring_coeff unit="N/M">220</spring_coeff>
      <damping_coeff unit="N/M/SEC">60</damping_coeff>
    </contact>
    <contact type="STRUCTURE" name="rightbase">
      <location unit="M">
        <x>   0.00 </x>
        <y>  -0.283 </y>
        <z>  -0.033</z>
      </location>
      <static_friction>  5 </static_friction>
      <dynamic_friction> 5 </dynamic_friction>
      <spring_coeff unit="N/M">220</spring_coeff>
      <damping_coeff unit="N/M/SEC">60</damping_coeff>
    </contact>
  </ground_reactions>

  <!--Final Configuration -->
  <propulsion>
    <engine file="DJI-3510-380" name="PX4_1">
      <location unit="M">
        <x>   0.0 </x>
        <y>   0.772 </y>
        <z>   0.345  </z>
      </location>
      <orient unit="DEG">
        <pitch> 90.00</pitch>
        <roll>   0.00 </roll>
        <yaw>    0.00 </yaw>
      </orient>
      <feed>0</feed>
      <thruster file="APC_13x8E_8K">
        <location unit="M">
          <x>   0.0 </x>
          <y>   0.772 </y>
          <z>   0.345 </z>
        </location>
        <orient unit="DEG">
          <pitch>90.00 </pitch>
          <roll>  0.00 </roll>
          <yaw>   0.00 </yaw>
        </orient>
        <sense> -1 </sense>
      </thruster>
    </engine>
    <engine file="DJI-3510-380" name="PX4_2">
      <location unit="M">
        <x>   0.0 </x>
        <y>  -0.772 </y>
        <z>   0.345 </z>
      </location>
      <orient unit="DEG">
        <pitch> 90.00 </pitch>
        <roll>   0.00 </roll>
        <yaw>    0.00 </yaw>
      </orient>
      <feed>0</feed>
      <thruster file="APC_13x8E_8K">
        <location unit="M">
          <x>   0.0   </x>
          <y>  -0.772 </y>
          <z>   0.345 </z>
        </location>
        <orient unit="DEG">
          <pitch> 90.00 </pitch>
          <roll>   0.00 </roll>
          <yaw>    0.00 </yaw>
        </orient>
        <sense> 1 </sense>
      </thruster>
    </engine>
    <engine file="DJI-3510-380" name="PX4_3">
      <location unit="M">
        <x>  -0.669</x>
        <y>  -0.386 </y>
        <z>   0.345 </z>
      </location>
      <orient unit="DEG">
        <pitch> 90.00 </pitch>
        <roll>   0.00 </roll>
        <yaw>    0.00 </yaw>
      </orient>
      <feed>0</feed>
      <thruster file="APC_13x8E_8K">
        <location unit="M">
          <x>  -0.669</x>
          <y>  -0.386 </y>
          <z>   0.345 </z>
        </location>
        <orient unit="DEG">
          <pitch> 90.00 </pitch>
          <roll>   0.00 </roll>
          <yaw>    0.00 </yaw>
        </orient>
        <sense> -1 </sense>
      </thruster>
    </engine>
    <engine file="DJI-3510-380" name="PX4_4">
      <location unit="M">
        <x>   0.669 </x>
        <y>   0.386 </y>
        <z>   0.345 </z>
      </location>
      <orient unit="DEG">
        <pitch> 90.00 </pitch>
        <roll>   0.00 </roll>
        <yaw>    0.00 </yaw>
      </orient>
      <feed>0</feed>
      <thruster file="APC_13x8E_8K">
        <location unit="M">
          <x>   0.669 </x>
          <y>   0.386 </y>
          <z>   0.345 </z>
        </location>
        <orient unit="DEG">
          <pitch> 90.00 </pitch>
          <roll>   0.00 </roll>
          <yaw>    0.00 </yaw>
        </orient>
        <sense> 1 </sense>
      </thruster>
    </engine>
    <engine file="DJI-3510-380" name="PX4_5">
      <location unit="M">
        <x>  -0.669 </x>
        <y>   0.386 </y>
        <z>   0.345 </z>
      </location>
      <orient unit="DEG">
        <pitch> 90.00 </pitch>
        <roll>   0.00 </roll>
        <yaw>    0.00 </yaw>
      </orient>
      <feed>0</feed>
      <thruster file="APC_13x8E_8K">
        <location unit="M">
          <x>  -0.669 </x>
          <y>   0.386 </y>
          <z>   0.345 </z>
        </location>
        <orient unit="DEG">
          <pitch> 90.00 </pitch>
          <roll>   0.00 </roll>
          <yaw>    0.00 </yaw>
        </orient>
        <sense> 1 </sense>
      </thruster>
    </engine>
    <engine file="DJI-3510-380" name="PX4_6">
      <location unit="M">
        <x>   0.669 </x>
        <y>  -0.386 </y>
        <z>   0.345 </z>
      </location>
      <orient unit="DEG">
        <pitch> 90.0 </pitch>
        <roll>   0.00 </roll>
        <yaw>    0.00 </yaw>
      </orient>
      <feed>0</feed>
      <thruster file="APC_13x8E_8K">
        <location unit="M">
          <x>   0.669 </x>
          <y>  -0.386 </y>
          <z>   0.345 </z>
        </location>
        <orient unit="DEG">
          <pitch> 90.0 </pitch>
          <roll>   0.00 </roll>
          <yaw>    0.00 </yaw>
        </orient>
        <sense> -1 </sense>
      </thruster>
    </engine>
    <tank type="FUEL" number="0">
      <location unit="M">
        <x>   0.00 </x>
        <y>   0.00 </y>
        <z>  -0.07 </z>
      </location>
      <capacity unit="KG"> 0.00000000001 </capacity>
      <contents unit="KG"> 0.0 </contents>
    </tank>
  </propulsion>

  <!-- Uncomment to use existing JSBSim electric model
  <propulsion>
    <engine file="electric_eqv" name="PX4_1">
      <location unit="M">
        <x>   0.0 </x>
        <y>   0.772 </y>
        <z>   0.345  </z>
      </location>
      <orient unit="DEG">
        <pitch> 90.00</pitch>
        <roll>   0.00 </roll>
        <yaw>    0.00 </yaw>
      </orient>
      <feed>0</feed>
      <thruster file="APC_13x8E_8K">
        <location unit="M">
          <x>   0.0 </x>
          <y>   0.772 </y>
          <z>   0.345 </z>
        </location>
        <orient unit="DEG">
          <pitch>90.00 </pitch>
          <roll>  0.00 </roll>
          <yaw>   0.00 </yaw>
        </orient>
        <sense> -1 </sense>
      </thruster>
    </engine>
    <engine file="electric_eqv" name="PX4_2">
      <location unit="M">
        <x>   0.0 </x>
        <y>  -0.772 </y>
        <z>   0.345 </z>
      </location>
      <orient unit="DEG">
        <pitch> 90.00 </pitch>
        <roll>   0.00 </roll>
        <yaw>    0.00 </yaw>
      </orient>
      <feed>0</feed>
      <thruster file="APC_13x8E_8K">
        <location unit="M">
          <x>   0.0   </x>
          <y>  -0.772 </y>
          <z>   0.345 </z>
        </location>
        <orient unit="DEG">
          <pitch> 90.00 </pitch>
          <roll>   0.00 </roll>
          <yaw>    0.00 </yaw>
        </orient>
        <sense> 1 </sense>
      </thruster>
    </engine>
    <engine file="electric_eqv" name="PX4_3">
      <location unit="M">
        <x>  -0.669</x>
        <y>  -0.386 </y>
        <z>   0.345 </z>
      </location>
      <orient unit="DEG">
        <pitch> 90.00 </pitch>
        <roll>   0.00 </roll>
        <yaw>    0.00 </yaw>
      </orient>
      <feed>0</feed>
      <thruster file="APC_13x8E_8K">
        <location unit="M">
          <x>  -0.669</x>
          <y>  -0.386 </y>
          <z>   0.345 </z>
        </location>
        <orient unit="DEG">
          <pitch> 90.00 </pitch>
          <roll>   0.00 </roll>
          <yaw>    0.00 </yaw>
        </orient>
        <sense> -1 </sense>
      </thruster>
    </engine>
    <engine file="electric_eqv" name="PX4_4">
      <location unit="M">
        <x>   0.669 </x>
        <y>   0.386 </y>
        <z>   0.345 </z>
      </location>
      <orient unit="DEG">
        <pitch> 90.00 </pitch>
        <roll>   0.00 </roll>
        <yaw>    0.00 </yaw>
      </orient>
      <feed>0</feed>
      <thruster file="APC_13x8E_8K">
        <location unit="M">
          <x>   0.669 </x>
          <y>   0.386 </y>
          <z>   0.345 </z>
        </location>
        <orient unit="DEG">
          <pitch> 90.00 </pitch>
          <roll>   0.00 </roll>
          <yaw>    0.00 </yaw>
        </orient>
        <sense> 1 </sense>
      </thruster>
    </engine>
    <engine file="electric_eqv" name="PX4_5">
      <location unit="M">
        <x>  -0.669 </x>
        <y>   0.386 </y>
        <z>   0.345 </z>
      </location>
      <orient unit="DEG">
        <pitch> 90.00 </pitch>
        <roll>   0.00 </roll>
        <yaw>    0.00 </yaw>
      </orient>
      <feed>0</feed>
      <thruster file="APC_13x8E_8K">
        <location unit="M">
          <x>  -0.669 </x>
          <y>   0.386 </y>
          <z>   0.345 </z>
        </location>
        <orient unit="DEG">
          <pitch> 90.00 </pitch>
          <roll>   0.00 </roll>
          <yaw>    0.00 </yaw>
        </orient>
        <sense> 1 </sense>
      </thruster>
    </engine>
    <engine file="electric_eqv" name="PX4_6">
      <location unit="M">
        <x>   0.669 </x>
        <y>  -0.386 </y>
        <z>   0.345 </z>
      </location>
      <orient unit="DEG">
        <pitch> 90.0 </pitch>
        <roll>   0.00 </roll>
        <yaw>    0.00 </yaw>
      </orient>
      <feed>0</feed>
      <thruster file="APC_13x8E_8K">
        <location unit="M">
          <x>   0.669 </x>
          <y>  -0.386 </y>
          <z>   0.345 </z>
        </location>
        <orient unit="DEG">
          <pitch> 90.0 </pitch>
          <roll>   0.00 </roll>
          <yaw>    0.00 </yaw>
        </orient>
        <sense> -1 </sense>
      </thruster>
    </engine>
    <tank type="FUEL" number="0">
      <location unit="M">
        <x>   0.00 </x>
        <y>   0.00 </y>
        <z>  -0.07 </z>
      </location>
      <capacity unit="KG"> 0.00000000001 </capacity>
      <contents unit="KG"> 0.0 </contents>
    </tank>
  </propulsion>
-->
  <aerodynamics>
    <axis name="LIFT">
        </axis>
    <axis name="DRAG">
      <function name="aero/coefficient/CD0">
        <description>Overall Drag</description>
        <product>
          <property>aero/qbar-psf</property>
          <property>metrics/Sw-sqft</property>
          <value>1</value>
        </product>
      </function>
    </axis>
    <axis name="SIDE">
        </axis>
    <axis name="ROLL">
        </axis>
    <axis name="PITCH">
        </axis>
    <axis name="YAW">
        </axis>
  </aerodynamics>

    <output name="prop_perf.csv" type="CSV">
  	<property>propulsion/engine[0]/thrust-lbs</property>
	<property>propulsion/engine[0]/prop_torque_ftlbs</property>
    <property>propulsion/engine[1]/thrust-lbs</property>
	<property>propulsion/engine[1]/prop_torque_ftlbs</property>
    <property>propulsion/engine[2]/thrust-lbs</property>
	<property>propulsion/engine[2]/prop_torque_ftlbs</property>
    <property>propulsion/engine[3]/thrust-lbs</property>
	<property>propulsion/engine[3]/prop_torque_ftlbs</property>
    <property>propulsion/engine[4]/thrust-lbs</property>
	<property>propulsion/engine[4]/prop_torque_ftlbs</property>
    <property>propulsion/engine[5]/thrust-lbs</property>
	<property>propulsion/engine[5]/prop_torque_ftlbs</property>
    <forces>ON</forces>
    <moments>ON</moments>
    </output>

</fdm_config>
